# Из формулы
G(f) == G_0*1/(1 + (2*π*f*τ)^2)
G_0 := 1
τ(f) == sqrt(1/G(f) - 1)/(2*π*f)
# [component: outputs f]
# [component: outputs G]
τ := sqrt(1/G - 1)/(2*π*f) = [5.54068e-9; 6.57987e-9; 6.49341e-9]
(5.541*10^-9 + 6.58*10^-9 + 6.493*10^-9)/3 = 6.20467e-9
# среднее значение постоянной времени цепи
